!--- OpenDSS Linecodes file generated from Show LINECONSTANTS command
!--- Frequency = 60 Hz, Earth resistivity = 100 ohm-m
!--- Earth Model = Deri

New Linecode.750mcm nphases=3  Units=kft
~ Rmatrix=[0.118301  |0.0955901  0.121447  |0.09103  0.0955901  0.118301  ]
~ Xmatrix=[0.19084  |0.0981727  0.18699  |0.0845814  0.0981727  0.19084  ]
~ Cmatrix=[88.7665  |0  88.7665  |0  0  88.7665  ]

New Linecode.750mcmwneutral nphases=3  Units=kft
~ Rmatrix=[0.0894025  |0.0714375  0.090593  |0.0709875  0.0714375  0.0894025  ]
~ Xmatrix=[0.103224  |0.0531358  0.0921997  |0.058525  0.0531358  0.103224  ]
~ Cmatrix=[88.7665  |0  88.7665  |0  0  88.7665  ]
